// COMSOL Multiphysics 5.3.0.316 model "mom_test.mph"
// Outline of the model tree

Parameters
  m = 1.67e-27 [kg]  // Ion mass
  Te = 5.0 [eV]  // Electron temp
  Ti = 5.0 [eV]  // Ion temp
  cs = sqrt((Te+Ti)/m)
  xmax = 2.0 [m]
  xmin = 0.0 [m]
  nmax = 1.0e19 [1/m^3]
  nmin = 1.0e16 [1/m^3]
  gradient = (nmax-nmin)/(xmax-xmin)

Functions
  step1: Step

Variables
  var1 "Variables 1"
    nx = exp(norm_x)
    dnx = d(nx,x)
    norm_x = x/1 [m]
    step = (x>0)
    step2 = step1(norm_x)

Geometry
  geom1 "Geometry 1" (1D, length unit m)
    i1: Interval | p2 = 2; p = {0, 2}
    fin: Finalize "Form Union"

Physics
  c: CoefficientFormPDE on all domains
    dependent variable u
    Units.DependentVariableQuantity = velocity
    Units.SourceTermQuantity = acceleration
    cfeq1: CoefficientFormPDE (default) | c = 0; f = ((Te+Ti)/(m*nx))*dnx; da = 1; be = u
    zflx1: ZeroFluxBoundary "Zero Flux 1" (default)
    init1: init "Initial Values 1" (default) | u = cs/2
    dir1: DirichletBoundary "LHS Dirichlet Boundary Condition" on boundaries 1 | r = 0
    dir2: DirichletBoundary "RHS Dirichlet Boundary Condition" on boundaries 2 | r = cs
  cdeq: ConvectionDiffusionEquation (disabled) on all domains
    dependent variable u2
    cdeq1: ConvectionDiffusionEquation (default)
    zflx1: ZeroFluxBoundary "Zero Flux 1" (default)
    init1: init "Initial Values 1" (default)
  g: GeneralFormPDE (disabled) on all domains
    dependent variable u3
    Units.DependentVariableQuantity = velocity
    Units.CustomSourceTermUnit = m/s^2
    gfeq1: GeneralFormPDE (default) | f = 0; Ga = (u3^2)/2; da = 1
    zflx1: ZeroFluxBoundary "Zero Flux 1" (default)
    init1: init "Initial Values 1" (default) | u3 = 10
    dir1: DirichletBoundary "Dirichlet Boundary Condition 1" on boundaries 2 | r = 10
    dir2: DirichletBoundary "Dirichlet Boundary Condition 2" on boundaries 1 | r = 0

Mesh
  mesh1 "Mesh 1" (physics-controlled)

Studies
  std1 "Study 1"
    time: Transient "Time Dependent" | tlist = range(0,5.0e-10,1e-8); physselection = c; solve for = {g}

Solver configurations
  sol1 "Solution 1" (study std1)
    v1: Variables "Dependent Variables 1"
    t1: Time "Time-Dependent Solver 1"
      tlist = range(0,5.0e-10,1e-8)
      timemethod = rk
      tstepsbdf = intermediate
      stabcntrl = on
      tstepsrk34 = manual
      timesteprk34 = 1.0e-10
      dDef: Direct
      fc1: FullyCoupled | linsolver = dDef

Datasets
  dset1: Solution | solution = sol1

Plots
  pg1: PlotGroup1D "1D Plot Group 1" | data = dset1
    lngr1: LineGraph "Velocity" on all domains | data = dset1; expr = u; xdata = expr; xdataexpr = x
  pg2: PlotGroup1D "1D Plot Group 2" | data = dset1
    lngr1: LineGraph "Density" on all domains | data = dset1; expr = nx; xdata = expr; xdataexpr = x; legends = nx
    lngr2: LineGraph "Density derivative" on all domains
      data = dset1
      expr = dnx
      xdata = expr
      xdataexpr = x
      legends = dnx
    lngr3: LineGraph on all domains | expr = nx(x); descr = nx; xdataexpr = x; legends = nx (function)